# AguaClara Water Treatment Plants
# Automated Design
# Add variable descriptions next to every varible so it is easy to interpret what this all means.
# Design References
# [reference: BasicInputs.xmcd]
# Use BasicClientInputs and ExpertClientInputs when this is run by LabVIEW.
# Use BasicInputs and ExpertInputs to use the program in MathCAD
# Change the reference by
# - right clicking
# - select properties
# - reference tab
# - type in the correct file name
# [reference: ExpertInputs.xmcd]
B_SedPlateFramePipes = 0.3 m
# [reference: DesignAssumptions.xmcd]
# [reference: MathFunctions.xmcd]
# [reference: PipeDatabase.xmcd]
Q_Plant = 12 L/s
# [reference: MinorLossCoefficients.xmcd]
# [reference: FluidsFunctions.xmcd]
# [reference: Sedimentation Tank.xmcd]
# [reference: Flocculator.xmcd]
# [reference: Rapid Mix.xmcd]
# [reference: EntranceTankDim.xmcd]
# [reference: Chemical Doser temp.xmcd]
# [reference: ChemStorageCylinders.xmcd]
# [reference: Materials List.xmcd]
W_SedBay = 1.08 m
N_SedTanks = 4
W_ExitChannelMin = 0.2032 m
W_SedBay = 1.08 m
N_SedBays = 1
# Sed Tanks and Slopes:
Geom_ExitChannel = 1
N_SedTanks = 4
H_SedBetween = 0 cm  # Distance from the top of the inlet manifold to the bottom of the ledge supporting the lamella frame
L_Sed = 3.83048 m
N_SedBays = 1  # Number of bays of inlet manifolds in each sed tank
# Length of the port through which water exits the inlet manifold
# Width of ferrous cement plates in whice one manifold port is cut
Q_SedBay = 3 L/s
# Sedimentation Tank Sludge Drain:
N_SedSludgeOrifices = 38  # per cell
Ti_SludgeDrain = 30 min  # Tank Drain time
W_SedSludge = 9.14557 cm  # Width of the sludge channel
B_SedSludgeOrifices = 10 cm  # Distance center to center between drain orifices
H_SedSludge = 4.57279 cm  # Depth of the sludge channel
T_SedSludge = 5 cm
T_SedSludge = 5 cm
# Thickness of the plate topping the sludge channel
# through which drain holes are formed
W_SedDrainCover = 19.1456 cm
D_SedSludgeOrifice = 0.009 m  # Diameter of drain orifices
W_SedInletBottom = 0.444272 m
N_SedSludgeOrifices = 38
ND_SedSludgeValve = 3 in
# Sedimentation Tank Dimensions:
Z_SedSludge = 0.0957279 m  # Height from 0 of the top of the sludge drain
Z_SedSlopes = 0.821929 m  # Height from 0 of the top of the inlet manifold
W_Sed = 1.08 m  # Total tank wall height
L_Sed = 3.83048 m  # Total tank length
# Inlet Channel:
HW_InletChannel = 0.255898 m  # Width of the drop chimneys connecting channel to sed inlet manifolds
W_InletChannel = 0.41787 m  # length of drop chimmneys
L_Channel = 5.07 m
N_SedInletPipes = 2  # per sed bay
H_InletChannel = 0.355898 m
# Sedimentation Tank Effluent Launder:
N_SedLaunderOrifices = 44  # Number of orifices per launder
Q_SedLaunderOrifices = 7.12515e-5 m^3/s  # More Launder Dimensions
ND_SedLaunder = 4 in
B_SedLaunderOrifices = 0.118967 m  # Center to center launder spacing
L_SedLaunder = 2.73944 m
# Exit Channel:
D_SedLaunderOrifice = 0.511811 in
W_ExitChannel = 0.373167 m
H_ExitChannel = 0.355898 m
L_ExitChannel = 5.07 m
H_PltWeir = 0.265898 m  # height of the weir carrying water to the distribution tank
HW_ExitChannel = 0.215898 m  # water height in exit channel from 0
# Lamella:
L_SedPlate = 0.609667 m
B_SedPlate = 2.83328 cm  # center to center distance between lamella
S_SedPlate = 2.63328 cm  # spacing between lamella
N_SedPlates = 80  # Number of Sed Plates per Sedimentation Tank Bay.
AN_SedPlate = 60 deg
V_SedC = 8.94882 m/day
L_SedActive = 2.61727 m
T
V_SedUp = 62.6554 m/day
Z_SedLaunder = 1.54533 m
H_SedPlate = 0.527987 m
H_SedAbove = 0.151317 m  # Height of water needed above the lamella
N_SedPlates = 80
HW_Sed = 1.63949 m
H_Sed = 1.73949 m
Z_Mp = 1.38359 m
H_SedBayDivider = 0.821929 m
# Flocculator: | Look at Flocculator Positioning arrays
W_FlocChannel = 0.54 m
# Fill last channel with bafffles from last channel
# Fix port width to be based on energy dissipation in that channel
ED_Floc = 6 mW/kg
# Adjust spacing after the number of baffles per channel is known.
# Check the residence time of the flocculator should be at least 20minutes
HW_FlocEnd = 1.63949 m
X_FlocBaffles = [
    0.190385, 0.190385, 0.190385, 0.28193;
    0.362771, 0.362771, 0.362771, 0.45857;
    0.535156, 0.535156, 0.535156, 0.63521;
    0.707541, 0.707541, 0.707541, 0.81185;
    0.879927, 0.879927, 0.879927, 0.98849;
    1.05231, 1.05231, 1.05231, 1.16513;
    1.2247, 1.2247, 1.2247, 1.34177;
    1.39708, 1.39708, 1.39708, 1.51841;
    1.56947, 1.56947, 1.56947, 1.69505;
    1.74185, 1.74185, 1.74185, 1.87169;
    1.91424, 1.91424, 1.91424, 2.04833;
    2.08662, 2.08662, 2.08662, 2.22497;
    2.25901, 2.25901, 2.25901, 2.40161;
    2.43139, 2.43139, 2.43139, 2.57825;
    2.60378, 2.60378, 2.60378, 2.75489;
    2.77617, 2.77617, 2.77617, 2.93153;
    2.94855, 2.94855, 2.94855, 3.10817;
    3.12094, 3.12094, 3.12094, 3.28481;
    3.29332, 3.29332, 3.29332, 3.46145;
    3.46571, 3.46571, 3.46571, 3.63809;
    3.63809, 3.63809, 3.63809, 0
] m
L_FlocBaffles = [
    1.46911, 1.46911, 1.46911, 1.66826;
    1.66826, 1.66826, 1.66826, 1.46911;
    1.46911, 1.46911, 1.46911, 1.66826;
    1.66826, 1.66826, 1.66826, 1.46911;
    1.46911, 1.46911, 1.46911, 1.66826;
    1.66826, 1.66826, 1.66826, 1.46911;
    1.46911, 1.46911, 1.46911, 1.66826;
    1.66826, 1.66826, 1.66826, 1.46911;
    1.46911, 1.46911, 1.46911, 1.66826;
    1.66826, 1.66826, 1.66826, 1.46911;
    1.46911, 1.46911, 1.46911, 1.66826;
    1.66826, 1.66826, 1.66826, 1.46911;
    1.46911, 1.46911, 1.46911, 1.66826;
    1.66826, 1.66826, 1.66826, 1.46911;
    1.46911, 1.46911, 1.46911, 1.66826;
    1.66826, 1.66826, 1.66826, 1.46911;
    1.46911, 1.46911, 1.46911, 1.66826;
    1.66826, 1.66826, 1.66826, 1.46911;
    1.46911, 1.46911, 1.46911, 1.66826;
    1.66826, 1.66826, 1.66826, 1.46911;
    1.46911, 1.46911, 1.46911, 0
] m
Z_FlocBaffles = [
    0, 0, 0, 0.17464;
    0.170385, 0.170385, 0.170385, 0;
    0, 0, 0, 0.17464;
    0.170385, 0.170385, 0.170385, 0;
    0, 0, 0, 0.17464;
    0.170385, 0.170385, 0.170385, 0;
    0, 0, 0, 0.17464;
    0.170385, 0.170385, 0.170385, 0;
    0, 0, 0, 0.17464;
    0.170385, 0.170385, 0.170385, 0;
    0, 0, 0, 0.17464;
    0.170385, 0.170385, 0.170385, 0;
    0, 0, 0, 0.17464;
    0.170385, 0.170385, 0.170385, 0;
    0, 0, 0, 0.17464;
    0.170385, 0.170385, 0.170385, 0;
    0, 0, 0, 0.17464;
    0.170385, 0.170385, 0.170385, 0;
    0, 0, 0, 0.17464;
    0.170385, 0.170385, 0.170385, 0;
    0, 0, 0, 0
] m
N_FlocChannels = 4
L_FlocTank = 15.3219 m
HL_Floc = 14.9154 cm
HW_FlocStart = 1.78865 m
S_FlocBaffle = [17.0385; 17.0385; 17.0385; 17.464] cm
B_FlocBaffle = [17.2385; 17.2385; 17.2385; 17.664] cm
N_FlocChannelBaffles = [21; 21; 21; 20]
W_FlocPort = [0.170385; 0.170385; 0.170385; 0.180499] m
HL_FlocChannels = [3.81604; 3.81604; 3.81604; 3.46725] cm
L_FlocBaffleLower = 1.46911 m
L_FlocBaffleUpper = 1.66826 m
H_FlocPort = [0.54; 0.54; 0.54; 0.522472] m
Ti_Floc = 18.8401 min  # residence time of the flocculator
N_FlocBaffles = 83
# Materials List:
N_Launders = 4
L_LaunderPipeTotal = 10.9578 m
N_Valves = 4
N_LaunderCouplings = 4
N_ValveCouplings = 4
N_SedPlatesTotal = 320
N_SedPlatesPerSheet = 6
N_SedPlateSheets = 54
# [reference: AutoCADMasterProgram.xmcd]
# AutoCAD References
AC_SedTank =  # no stored result
AC_EntranceTank = [
    "-layer m EntranceTank"; "c t 214,214,214"; "EntranceTank"; "  "; "_-view o t _zoom w 0.31,9.55022,0.94008 -4.09288,10.32022,2.3943 _box 0.15,9.71023,0.94008 -3.93288,10.16022,2.3943 _box 0.3,9.56022,0.79008 -4.08288,10.31022,2.3943 _subtract 0.3,9.56022,0.79008  0.15,9.71023,0.94008 "; "-group c EntranceTank y "; "all "; "-layer s 0"; "  "; "-layer f EntranceTank"
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]
AC_FlocTank = [
    "-layer m FlocTank"; "c t 132,132,132"; "FlocTank"; "  "; "_-view o t _zoom w 0.16,4.76,0 -3.99048,7.69,1.88865 _box 0,4.92,0 -3.83048,7.53,1.88865 _box 0.15,4.77,-0.15 -3.98048,7.68,1.88865 _subtract 0.15,4.77,-0.15  0,4.92,0 "; "_box -3.98048,5.46,0 0.15,5.61,1.88865"; "_box -3.98048,6.15,0 0.15,6.3,1.88865"; "_box -3.98048,6.84,0 0.15,6.99,1.88865"; "-group c FlocTank y "; "all "
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]
AC_ChemTanks = ["-layer m alumtanks"; "c t 132,132,132"; "alumtanks"; "  "; "_-view o t"; "_cylinder -0.075,8.25432,2.9943 0.4559 1.3577"; "_cylinder -0.075,8.25432,2.9993 0.4509 1.3527"; "_-view o t"; "_subtract -0.5309,8.25432,2.9943  -0.5259,8.25432,2.9943 "; "_mirror all  -0.085,7.74842 -0.065,7.74842 "; "_union all "; "-layer s 0"; "  "; "-layer f alumtanks"; "  "]
AC_DrainChannel = [
    "_-view o t"; "-layer m DrainChannel"; "c t 214,214,214"; "DrainChannel"; "  "; "3dpoly "; "-4.69835,-0.83574,-0.3"; "-4.69835,-0.83574,-0.56406"; "-4.33941,-0.83574,-0.773"; "-3.98048,-0.83574,-0.56406"
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]
